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/BATCH
/COM,ANSYS RELEASE Release 17.0      BUILD 17.0      UP20151214       12:03:10
/input,menust,tmp,''
/GST,ON
/PLO,INFO,3
/GRO,CURL,ON
/CPLANE,1
WPSTYLE,,,,,,,,0
/POST1
FINISH
/SOL
FINISH
/POST1
FINISH
! /EXIT,NOSAV
/BATCH
/COM,ANSYS RELEASE Release 17.0      BUILD 17.0      UP20151214       12:17:27
/input,menust,tmp,''
/GST,ON
/PLO,INFO,3
/GRO,CURL,ON
/CPLANE,1
WPSTYLE,,,,,,,,0
/BATCH
/COM,ANSYS RELEASE Release 17.0      BUILD 17.0      UP20151214       12:47:24
/input,menust,tmp,''
/GST,ON
/PLO,INFO,3
/GRO,CURL,ON
/CPLANE,1
WPSTYLE,,,,,,,,0
/PREP7
/com,Curve Fitting Experimental Data Written To lab4_UNIA_1.exp
TBFT,EADD,1,UNIA,lab4_UNIA_1.exp
TBFT,FADD,1,HYPER,NEO,
TBFT,SOLVE,1,HYPER,NEO,,1
/BATCH
/COM,ANSYS RELEASE Release 17.0      BUILD 17.0      UP20151214       12:52:59
/input,menust,tmp,''
/GST,ON
/PLO,INFO,3
/GRO,CURL,ON
/CPLANE,1
WPSTYLE,,,,,,,,0
/PREP7
/com,Curve Fitting Experimental Data Written To lab4_UNIA_1.exp
TBFT,EADD,1,UNIA,lab4_UNIA_1.exp
TBFT,FADD,1,HYPER,NEO,
TBFT,SOLVE,1,HYPER,NEO,,1
/BATCH
/COM,ANSYS RELEASE Release 17.0      BUILD 17.0      UP20151214       12:54:17
/input,menust,tmp,''
/GST,ON
/PLO,INFO,3
/GRO,CURL,ON
/CPLANE,1
WPSTYLE,,,,,,,,0
/PREP7
/com,Curve Fitting Experimental Data Written To lab4_UNIA_1.exp
TBFT,EADD,1,UNIA,lab4_UNIA_1.exp
TBFT,FADD,1,HYPER,MOON,2
TBFT,SOLVE,1,HYPER,MOON,2,1
TBFT,FSET,1,HYPER,MOON,2
TBFT,FSET,1,HYPER,MOON,2
ET,1,PLANE182
lab4
/COM,ANSYS RELEASE Release 17.0      BUILD 17.0      UP20151214       13:10:18
/PREP7
lab4
/COM,ANSYS RELEASE Release 17.0      BUILD 17.0      UP20151214       13:14:10
lab4
/COM,ANSYS RELEASE Release 17.0      BUILD 17.0      UP20151214       13:14:41
lab4
/COM,ANSYS RELEASE Release 17.0      BUILD 17.0      UP20151214       13:16:20
/PREP7
/LIG,   1,1, 1.000,   0.00000000000    ,   0.00000000000    ,   0.00000000000    ,   0.00000000000
FLST,4,6,1
FITEM,4,2
FITEM,4,56
FITEM,4,57
FITEM,4,58
FITEM,4,59
FITEM,4,55
CP, ,ALL,P51X
lab4
/COM,ANSYS RELEASE Release 17.0      BUILD 17.0      UP20151214       13:21:57
cplist
lab4
/COM,ANSYS RELEASE Release 17.0      BUILD 17.0      UP20151214       13:26:00
/SOLU
FINISH
/POST1
SET,LIST,999
SET,,, ,,, ,15
PLDISP,2
/EXPAND,27,AXIS,,,10
PLDISP,2
ANDSCL,10,0.5
/EFACET,1
PLNSOL, S,INT, 0,1.0
/EFACET,1
PLNSOL, S,INT, 0,1.0
FINISH
/POST26
FILE,'lab4','rst','.'
NUMVAR,200
SOLU,191,NCMIT
STORE,MERGE
FILLDATA,191,,,,1,1
REALVAR,191,191
RFORCE,2,2,F,Y, FY_2
STORE,MERGE
NSOL,3,2,U,Y, UY_3,
STORE,MERGE
XVAR,3
PLVAR,2,
FILLDATA,192,,,,0,0
FILLDATA,193,,,,1,0
FILLDATA,194,,,,-1,0
FILLDATA,195,,,,1,1
VARNAME,195,NSET
!
! Name: U
! ID:  4
! Function: -{UY_3}
PROD,199,3,194
ADD,4,,199,,U
!
STORE,MERGE
XVAR,4
PLVAR,2,
XVAR,4
PLVAR,4,
XVAR,4
PLVAR,2,
XVAR,4
PLVAR,3,
XVAR,4
PLVAR,2,
XVAR,4
PLVAR,4,
XVAR,4
PLVAR,2,
XVAR,4
PLVAR,2,
FILLDATA,192,,,,0,0
FILLDATA,193,,,,1,0
FILLDATA,194,,,,-1,0
FILLDATA,195,,,,1,1
VARNAME,195,NSET
!
! Name: calc_5
! ID:  5
! Function: rforce(2 ,F,Y)*(-1)
RFORCE,200,2,F,Y
FILLDATA,198,,,,1,0
REALVAR,198,198
FILLDATA,197,,,,0,0
REALVAR,197,197
PROD,196,198,194
ADD,199,197,196
FILLDATA,197,,,,1,0
REALVAR,197,197
PROD,196,199,197
PROD,5,200,196,,calc_5
!
STORE,MERGE
FILLDATA,192,,,,0,0
FILLDATA,193,,,,1,0
FILLDATA,194,,,,-1,0
FILLDATA,195,,,,1,1
VARNAME,195,NSET
!
! Name: FY
! ID:  6
! Function: rforce(2 ,F,Y)*(-1)
RFORCE,200,2,F,Y
FILLDATA,198,,,,1,0
REALVAR,198,198
FILLDATA,197,,,,0,0
REALVAR,197,197
PROD,196,198,194
ADD,199,197,196
FILLDATA,197,,,,1,0
REALVAR,197,197
PROD,196,199,197
PROD,6,200,196,,FY
!
STORE,MERGE
VARDEL,5
XVAR,4
PLVAR,6,
/AXLAB,X,Displ, mm
/AXLAB,Y,Force, N
/GTHK,AXIS,2
/GRTYP,0
/GROPT,ASCAL,ON
/GROPT,LOGX,OFF
/GROPT,LOGY,OFF
/GROPT,AXDV,1
/GROPT,AXNM,ON
/GROPT,AXNSC,1,
/GROPT,DIG1,4,
/GROPT,DIG2,3,
/GROPT,XAXO,0,
/GROPT,YAXO,0,
/GROPT,DIVX,
/GROPT,DIVY,
/GROPT,REVX,0
/GROPT,REVY,0
/GROPT,LTYP,0
/XRANGE,DEFAULT
/YRANGE,DEFAULT,,1
XVAR,4
PLVAR,6,
lab4
/COM,ANSYS RELEASE Release 17.0      BUILD 17.0      UP20151214       13:42:11
FINISH
/POST1
/EFACET,1
PLNSOL, S,INT, 0,1.0
PLDISP,2
/EFACET,1
PLNSOL, S,INT, 0,1.0
/EFACET,1
PLNSOL, S,EQV, 0,1.0
FINISH
/POST26
NUMVAR,200
FILLDATA,191,,,,1,1
REALVAR,191,191
XVAR,5
PLVAR,5,
XVAR,5
PLVAR,3,
XVAR,5
PLVAR,2,
XVAR,3
PLVAR,2,
XVAR,5
PLVAR,2,
XVAR,3
PLVAR,2,
XVAR,5
PLVAR,2,
XVAR,3
PLVAR,2,
lab4
/COM,ANSYS RELEASE Release 17.0      BUILD 17.0      UP20151214       13:45:10
NUMVAR,200
FILLDATA,191,,,,1,1
REALVAR,191,191
XVAR,5
PLVAR,2,
lab4
/COM,ANSYS RELEASE Release 17.0      BUILD 17.0      UP20151214       13:46:32
NUMVAR,200
FILLDATA,191,,,,1,1
REALVAR,191,191
XVAR,5
PLVAR,2,
FINISH
/POST1
PLDISP,2
FINISH
/POST26
NUMVAR,200
FILLDATA,191,,,,1,1
REALVAR,191,191
FILLDATA,192,,,,0,0
FILLDATA,193,,,,1,0
FILLDATA,194,,,,-1,0
FILLDATA,195,,,,1,1
VARNAME,195,NSET
!
! Name: calc_4
! ID:  4
! Function: -{UY_3}
PROD,199,3,194
ADD,4,,199,,calc_4
!
STORE,MERGE
XVAR,5
PLVAR,4,
XVAR,3
PLVAR,4,
PRVAR,4,
XVAR,5
PLVAR,4,
XVAR,2
PLVAR,5,
XVAR,2
PLVAR,4,
XVAR,2
PLVAR,4,
XVAR,2
PLVAR,3,
XVAR,2
PLVAR,5,
VARDEL,4
VARDEL,5
XVAR,2
PLVAR,3,
FINISH
! /EXIT,NOSAV
/BATCH
/COM,ANSYS RELEASE Release 17.0      BUILD 17.0      UP20151214       13:51:39
/input,menust,tmp,''
/GST,ON
/PLO,INFO,3
/GRO,CURL,ON
/CPLANE,1
WPSTYLE,,,,,,,,0
lab4
/COM,ANSYS RELEASE Release 17.0      BUILD 17.0      UP20151214       13:57:54
/RGB,INDEX,100,100,100, 0
/RGB,INDEX,100,100,100, 0
/RGB,INDEX, 0, 0, 0,15
FINISH
/SOL
FINISH
/POST1
PLDISP,2
/EXPAND,27,AXIS,,,10
/EFACET,1
PLNSOL, S,INT, 0,1.0
/EFACET,1
PLNSOL, S,EQV, 0,1.0
